// COMSOL Multiphysics 6.3.0.290 model "Figure2.mph"
// Outline of the model tree

Parameters
  lqd = 3[nm]
  lbr = 3[nm]
  L = lqd+lbr
  Eg_qd = 0.70[eV]
  Eg_br = 3.39[eV]
  EV = 0[eV]
  EIB1 = 1.29[eV]
  EIB2 = 1.90[eV]
  EIB3 = 2.40[eV]

Variables
  var1 "Variables 1"
    Ec = if(x<lqd, Eg_qd, Eg_br)
    Ev = EV

Geometry
  geom1 "Geometry 1" (1D, length unit m)
    i1: Interval | specify = len; len = 6 [nm]
    fin: Finalize "Form Union"

Physics
  c: CoefficientFormPDE on all domains
    dependent variable u
    EquationForm.form = Automatic
    cfeq1: CoefficientFormPDE (default) | c = 1; f = 1; da = 1
    zflx1: ZeroFluxBoundary "Zero Flux 1" (default)
    init1: init "Initial Values 1" (default)

Mesh
  mesh1 "Mesh 1" (physics-controlled)

Studies
  std1 "Study 1"
    stat: Stationary

Solver configurations
  sol1 "Solution 1" (study std1)
    v1: Variables "Dependent Variables 1"
    s1: Stationary "Stationary Solver 1"
      dDef: Direct
      fc1: FullyCoupled

Datasets
  dset1: Solution | solution = sol1

Plots
  pg1: PlotGroup1D "1D Plot Group 1" | data = dset1; xlabel = Position [nm]
    lngr1: LineGraph on all domains | data = dset1; expr = Ec; unit = eV; xdataexpr = Ec
    lngr2: LineGraph on all domains | data = dset1; expr = Ev; unit = eV
    lngr3: LineGraph "EIB1" on all domains | data = dset1; expr = EIB1; unit = eV
    lngr4: LineGraph "EIB2" on all domains | data = dset1; expr = EIB2; unit = eV
    lngr5: LineGraph "EIB3" on all domains | data = dset1; expr = EIB3; unit = eV