// COMSOL Multiphysics 6.3.0.290 model "Rea_File.mph"
// Outline of the model tree

Parameters
  Lx = 300[nm]
  Ly = 300[nm]
  t_n = 200[nm]
  t_np = 200[nm]
  t_p = 600[nm]
  hp = 10[nm]
  rb = 5[nm]
  rt = 3[nm]
  s = 3[nm]
  wt = 5[nm]
  z_p_start = t_n+t_np
  z_p_end = z_p_start+t_p
  z_qd1 = z_p_start+150[nm]
  z_qd2 = z_p_start+450[nm]
  Vapp = 0[V]
  G0 = 0[1/m^3/s]
  Nd_n = 1e16[1/cm^3]
  Nd_np = 5e16[1/cm^3]
  Na_p = 1e16[1/cm^3]
  tau_n = 7[ns]
  tau_p = 5[ns]

Geometry
  geom1 "Geometry 1" (3D, length unit nm)
    blk1: Block "N_layer" | size = {Lx, Ly, t_n}
    blk2: Block "NP_layer" | size = {Lx, Ly, t_np}; pos = {0, 0, t_n}
    blk3: Block "P_layer" | size = {Lx, Ly, t_p}; pos = {0, 0, t_n + t_np}
    blk4: Block "WL1" | size = {Lx, Ly, wt}; pos = {0, 0, z_qd1}
    blk5: Block "WL2" | size = {Lx, Ly, wt}; pos = {0, 0, z_qd2}
    cone1: Cone "QD1" | r = rb; h = hp; specifytop = radius; rtop = rt; pos = {Lx/2, Ly/2, z_qd1 + wt}
    cone2: Cone "QD2" | r = rb; h = hp; specifytop = radius; rtop = rt; pos = {Lx/2, Ly/2, z_qd2 + wt}
    uni1: Union "All_union" | input = blk1, blk2, blk3, blk4, blk5, cone1, cone2; keep = on
    fin: Finalize "Form Union"

Materials
  mat1: Common "GaAs - Gallium Arsenide" on domains 1-7
    def: def "Basic"
      heatcapacity = 330[J/(kg*K)]
      density = 5500[kg/m^3]
      thermalconductivity = 46[W/(m*K)]
      relpermittivity = 12.9
    SemicondMaterial: SemicondMaterial "Semiconductor material"
      Eg0 = 1.424[V]
      chi0 = 4.07[V]
      Nv = (T/1[K])^(3/2)*1.83e15[1/cm^3]
      Nc = (8.63e13*(T/1[K])^(3/2)*(1-1.93e-4*(T/1[K])-4.19e-8*(T/1[K])^2+21*exp(-0.29[V]*e_const/(k_B_const*T))+44*exp(-0.48[V]*e_const/(k_B_const*T))))[1/cm^3]
      mun = 8500[cm^2/(V*s)]
      mup = 400[cm^2/(V*s)]
    JainRoulstonModel: JainRoulstonModel
      An_jr = 16.5e-9[V]
      Bn_jr = 2.39e-7[V]
      Cn_jr = 91.4e-12[V]
      Ap_jr = 9.83e-9[V]
      Bp_jr = 3.9e-7[V]
      Cp_jr = 3.9e-12[V]
      Nref_jr = 1[1/cm^3]
      alpha_jr = 0.5
  mat2: Common "InGaAs_QD" on domains 8, 9
    def: def "Basic"
      relpermittivity = 13.9
    SemicondMaterial: SemicondMaterial "Semiconductor material"
      Eg0 = 0.74
      chi0 = 4.9
      Nv = 1.8e25
      Nc = 2.2e24
      mun = 1
      mup = 0.03

Physics
  semi: Semiconductor on all domains
    dependent variable V
    dependent variable Ph
    Continuation.DopingTrapDensityContinuation = None
    smm1: SemiconductorMaterialModel (default)
    ins1: Insulation (default)
    zc1: ZeroCharge (default)
    ii1: InsulatorInterface (default)
    cont1: Continuity "Continuity/Heterojunction 1" (default)
    init1: init "Initial Values 1" (default)
    tar1: TrapAssistedRecombination (disabled) on all domains
      taun_mat = userdef
      taun = tau_n
      taup_mat = userdef
      taup = tau_p
    udg1: UDGeneration "User-Defined Generation 1" (disabled) on domains 3-9 | Gn = G0; Gp = G0
    mc1: MetalContact "Bottom_contact" on boundaries 3
    mc2: MetalContact "Top_contact" on boundaries 22 | V0 = Vapp
    adm1: AnalyticDopingModel "Doping_N_analytic" on domains 1 | impurityType = donor; NDc = Nd_n
    adm2: AnalyticDopingModel "Doping_Nplus_analytic" on domains 2 | impurityType = donor; NDc = Nd_np
    adm3: AnalyticDopingModel "Doping_P_analytic" on domains 3-9 | NAc = Na_p

Mesh
  mesh1 "Mesh 1"
    size: MeshSizeDefault | hmax = 100; hmin = 18; hcurve = 0.6; hnarrow = 0.5; hgrad = 1.5
    ftet1: FreeTet "Free Tetrahedral 1" on remaining entities

Studies
  std1 "Study 1"
    param: Parametric "Parametric Sweep" (disabled) | pname = Vapp; plistarr = 0.05; punit = V
    stat: Stationary

Solver configurations
  sol1 "Solution 1" (study std1)
    v1: Variables "Dependent Variables 1"
    s1: Stationary "Stationary Solver 1"
      fc1: FullyCoupled
      d1: Direct

Datasets
  dset1: Solution | solution = sol1

Derived values
  gev1: EvalGlobal "Global Evaluation 1" | data = dset1; table = tbl1; expr = semi.I0_2

Tables
  tbl1: Table
    // Global Evaluation 1
    Terminal current (A) | Terminal current (A)
    -6.29706e-14 | 4.56731e-05

Plots
  pg1: PlotGroup3D "Electron Concentration (semi)" | data = dset1
    vol1: Volume | expr = semi.N; unit = 1/cm^3
  pg2: PlotGroup3D "Hole Concentration (semi)" | data = dset1
    vol1: Volume | expr = semi.P; unit = 1/cm^3
  pg3: PlotGroup3D "Electric Potential (semi)" | data = dset1
    vol1: Volume | expr = V
  pg4: PlotGroup3D "Net Dopant Concentration (semi)"
    data = dset1
    title = Net Dopant Concentration \vert N<sub>d</sub> - N<sub>a</sub>\vert: P-type (Red), N-type (Blue)
    vol2: Volume "P-type" | expr = semi.Nnetdop; unit = 1/cm^3
      filt1: Filter | expr = semi.Na-semi.Nd > 1[1/cm^3]; useder = on
    vol1: Volume "N-type" | expr = semi.Nnetdop; unit = 1/cm^3
      filt1: Filter | expr = semi.Nd-semi.Na > 1[1/cm^3]; useder = on

Exports
  img1: Image | size = current; unit = px; width = 800; height = 600; pngfilename = C:\Users\reabi\Downloads\hello.png